# 1. Найдем уравнения прямых, включающих отрезки AB, CD
A(2, 12)*и*B(5, 9)
C(2, 3)*и*D(5, 6)
x1 := 2
x2 := 5
х1 := 2
х2 := 5
y1 := 12
y2 := 9
у1 := 3
у2 := 6
a := (y2 - y1)/(x2 - x1) = -1
а := (у2 - у1)/(х2 - х1) = 1
b := x1 - a*y1 = 14
в := -х1 + а*у1 = 1
f1(x) := a*x + b
f2(x) := а*x + в
# 2. Найдем точку P пересечения прямых AB и CD
xx := 1
f(xx) := f1(xx) - f2(xx)
x0 := root(f(xx), xx) = 6.5
y0 := f1(x0) = 7.5
# (6.5, 7.5) - координаты точки P в МСК
# 3. Найдем новые координаты точек
# Найдем матрица поворота М:
M := [cos(π), -sin(π); sin(π), cos(π)]
Ap := M*[x1 - x0; y1 - y0] + [x0; y0] = [11; 3]
Bp := M*[x2 - x0; y2 - y0] + [x0; y0] = [8; 6]
Cp := M*[х1 - x0; у1 - y0] + [x0; y0] = [11; 12]
Dp := M*[х2 - x0; у2 - y0] + [x0; y0] = [8; 9]
# 4. Построим график
Mabp := transpose([11, 8; 3, 6])
Mcdp := transpose([11, 8; 12, 9])
Mab := transpose([2, 5; 12, 9])
Mcd := transpose([2, 5; 3, 6])
xabp := Mabp[:, 0]
xcdp := Mcdp[:, 0]
xab := Mab[:, 0]
xcd := Mcd[:, 0]
yabp := Mabp[:, 1]
ycdp := Mcdp[:, 1]
yab := Mab[:, 1]
ycd := Mcd[:, 1]
# Верхняя строка - абсциссы вершин отрезка, нижняя - ординаты
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x1 := 2
x2 := 5
х1 := 2
х2 := 5
y1 := 12
y2 := 9
у1 := 3
у2 := 6
a := (y2 - y1)/(x2 - x1) = -1
а := (у2 - у1)/(х2 - х1) = 1
b := x1 - a*y1 = 14
в := -х1 + а*у1 = 1
f1(x) := a*x + b
f2(х) := а*х + в
xx := 1
f(xx) := f1(xx) - f2(xx)
x0 := root(f(xx), xx) = 6.5
y0 := f1(x0) = 7.5
M := [cos(π), -sin(π); sin(π), cos(π)]
Ap := M*[x1 - x0; y1 - y0] + [x0; y0] = [11; 3]
Bp := M*[x2 - x0; y2 - y0] + [x0; y0] = [8; 6]
Cp := M*[х1 - x0; у1 - y0] + [x0; y0] = [11; 12]
Dp := M*[х2 - x0; у2 - y0] + [x0; y0] = [8; 9]
Mab := transpose([2, 5; 12, 9])
Mcd := transpose([2, 5; 3, 6])
Mabp := transpose([11, 8; 3, 6])
Mcdp := transpose([11, 8; 12, 9])
xab := Mab[:, 0]
xcd := Mcd[:, 0]
xabp := Mabp[:, 0]
xcdp := Mcdp[:, 0]
yab := Mab[:, 1]
ycd := Mcd[:, 1]
yabp := Mabp[:, 1]
ycdp := Mcdp[:, 1]
